# OpenSim document version 40000
MuscleTendonPersonalizationTool:
  input_directory: preprocessed
  input_model_file: modelWithMuscleGroupsRightLegOnly.osim
  max_iterations: 2e3
  max_function_evaluations: 1e8
  MuscleTendonPersonalizationTaskList:
    MuscleTendonPersonalizationTask: is_enabled=true optimize_electromechanical_delays=true
        optimize_activation_time_constants=true optimize_activation_nonlinearity_constants=true
        optimize_emg_scale_factors=true optimize_optimal_muscle_lengths=false optimize_tendon_slack_lengths=false
  MuscleTendonCostFunctionTerms:
    IndividualMuscles: ActivationNonlinearityConstant(max_allowable_error=0)
      InverseDynamicJointMoments: max_allowable_error=0
      ActivationTimeConstant: max_allowable_error=0 error_center=0 muscle_specific_activation_time_constant=false
      OptimalMuscleFiberLength: max_allowable_error=0
      TendonSlackLength: max_allowable_error=0
      EmgScalingFactors: max_allowable_error=0 error_center=0
      NormalizedMuscleFiberLength: max_allowable_error=0
      PassiveMuscleForces: max_allowable_error=0
    PairedMuscles:
      NormalizedMuscleFiberLength: max_allowable_error=0
      EmgScalingFactors: max_allowable_error=0
      ElectromechanicalDelay: max_allowable_error=0 muscle_specific_electromechanical_delays=false
  PairedMuscles:
    PairedActivationTimeConstants: musclepairs=RAddLong musclepairs=RGasMed
    PairedNormalizedMuscleFiberLengths: musclepairs=RAddLong musclepairs=RGasMed
