# OpenSim document version 40000
JointModelPersonalizationTool:
  input_model_file: Rajagopal_4.0_RCNL_markers_scaled.osim
  output_model_file: Rajagopal_4.0_RCNL_markers_scaled_knee.osim
  allowable_error: 0.01
  accuracy: 1e-6
  diff_min_change: 1e-4
  optimality_tolerance: 1e-6
  function_tolerance: 1e-6
  step_tolerance: 1e-6
  max_function_evaluations: 3e3
  JMPTaskList:
    JMPTask Left Knee: is_enabled=true index=1 marker_file_name=l_knee.trc
      JMPJointSet:
        JMPJoint knee_l:
          parent_frame_transformation: translation=(true true false) orientation=(true true false)
              translation_bounds=0.1 orientation_bounds=1 [radians]
          child_frame_transformation: translation=(true true true) orientation=(true true false) translation_bounds=0.1
              orientation_bounds=1 [radians]
        JMPJoint hip_l:
          parent_frame_transformation: translation=(true true false) orientation=(true true false)
              translation_bounds=0.1 orientation_bounds=1
          child_frame_transformation: translation=(true true true) orientation=(true true false) translation_bounds=0.1
              orientation_bounds=1
      JMPBodySet:
        JMPBody femur_l: scale_body=true move_markers=(true false true)
        JMPBody tibia_l: scale_body=true move_markers=(true false true)
