# OpenSim document version 40000
JointModelPersonalizationTool:
  input_model_file: Patient3_Orig.osim
  output_model_file: test_output_file.osim
  ik_settings_file: IK.xml
  accuracy: 1e-6
  diff_min_change: 1e-4
  optimality_tolerance: 1e-10
  function_tolerance: 1e-12
  step_tolerance: 1e-5
  max_function_evaluations: 3e2
  JointPersonalizationTaskList:
    JointPersonalizationTask hip_calibration: is_enabled=true marker_file_name=r_knee_markers.trc
        time_range=(1.36 1.45)
      parent_frame_transformation: translation=(true true true) orientation=(false false false) translation_bounds=0.03
          orientation_bounds=0.5 [radians]
      child_frame_transformation: translation=(false false false) orientation=(false false false)
          translation_bounds=0.03 orientation_bounds=0.5 [radians]
