# OpenSim document version 40000
MuscleTendonPersonalizationTool:
  results_directory: results
  input_model_file: optModel_MuscleGroups_LeftMusclesActive_NewSynx.osim
  coordinate_list: hip_flexion_l hip_adduction_l hip_rotation_l knee_angle_l ankle_angle_l subtalar_angle_l
  muscle_specific_electromechanical_delays: false
  muscle_specific_activation_time_constant: false
  activation_muscle_groups: AdductorActivationGroupL GluteusMaxActivationGroupL GluteusMedActivationGroupL GluteusMinActivationGroupL IliopsoasActivationGroupL HamstringActivationGroupL BicepsFemActivationGroupL PeroneusActivationGroupL
  normalized_fiber_length_muscle_groups: AdductorFiberLengthGroupL GluteusMaxFiberLengthGroupL GluteusMedFiberLengthGroupL GluteusMinFiberLengthGroupL QuadricepFiberLengthGroupL HamstringFiberLengthGroupL PeroneusFiberLengthGroupL IliopsoasFiberLengthGroupL GastrocFiberLengthGroupL TibialisAnteriorFiberLengthGroupL TibialisPosteriorFiberLengthGroupL
  collected_emg_channel_muscle_groups: BicFemLongCollectedEmgChannelL GasMedCollectedEmgChannelL GlutMaxCollectedEmgChannelL GlutMedCollectedEmgChannelL SemiMembCollectedEmgChannelL SolCollectedEmgChannelL TibAntCollectedEmgChannelL VastLatCollectedEmgChannelL
  missing_emg_channel_muscle_groups: AddLongMissingEmgChannelL ExtDigLongMissingEmgChannelL FlexDigLongMissingEmgChannelL IliopsoasMissingEmgChannelL PeroneusLongMissingEmgChannelL RecFemMissingEmgChannelL TibPostMissingEmgChannelL VastMedMissingEmgChannelL
  v_max_factor: 10
  max_iterations: 2e3
  max_function_evaluations: 1e8
  task_prefixes: speed1 speed2
  MuscleTendonLengthInitialization: is_enabled=false passive_data_input_directory=thelen
      max_normalized_muscle_fiber_length=1 min_normalized_muscle_fiber_length=0.6 optimize_maximum_muscle_stress=true
      optimize_isometric_max_force=true maximum_muscle_stress=610e3
    MuscleTendonLengthInitializationCostFunctionTerms:
      IndividualMuscles:
        PassiveJointMoments: is_enabled=true max_allowable_error=2
        OptimalMuscleFiberLength: is_enabled=true max_allowable_error=0.3 error_center=1
        TendonSlackLength: is_enabled=true max_allowable_error=1 error_center=1
        MinimumNormalizedMuscleFiberLength: is_enabled=true max_allowable_error=0.3
        MaximumNormalizedMuscleFiberLength: is_enabled=true max_allowable_error=0.03
        MaximumMuscleStress: is_enabled=true max_allowable_error=0.1 error_center=1.2
        PassiveMuscleForces: is_enabled=true max_allowable_error=10
      GroupedMuscles:
        NormalizedMuscleFiberLength: is_enabled=true max_allowable_error=0.1
        MaximumNormalizedMuscleFiberLength: is_enabled=true max_allowable_error=0.1
  MuscleTendonPersonalizationTaskList:
    MuscleTendonPersonalizationTask: is_enabled=true index=1 optimize_electromechanical_delays=true
        optimize_activation_time_constants=true optimize_activation_nonlinearity_constants=true
        optimize_emg_scale_factors=true optimize_optimal_fiber_lengths=true optimize_tendon_slack_lengths=true
        perform_synergy_extrapolation=true
  MuscleTendonCostFunctionTerms:
    IndividualMuscles:
      InverseDynamicJointMoments: is_enabled=true max_allowable_error=2
      ActivationTimeConstant: is_enabled=true max_allowable_error=0.02 error_center=0.015
      ActivationNonlinearityConstant: is_enabled=true max_allowable_error=0.1
      OptimalMuscleFiberLength: is_enabled=true max_allowable_error=0.1
      TendonSlackLength: is_enabled=true max_allowable_error=0.1
      EmgScalingFactors: is_enabled=true max_allowable_error=0.2 error_center=0.3
      NormalizedMuscleFiberLength: is_enabled=true max_allowable_error=0.1
      PassiveMuscleForces: is_enabled=true max_allowable_error=50
    GroupedMuscles:
      NormalizedMuscleFiberLength: is_enabled=true max_allowable_error=0.05
      EmgScalingFactors: is_enabled=true max_allowable_error=0.1
      ElectromechanicalDelay: is_enabled=true max_allowable_error=0.2 muscle_specific_electromechanical_delays=false
    SynergyExtrapolationSettings: matrix_factorization_method=PCA number_of_synergies=5
        synergy_extrapolation_categorization=trial residual_categorization=task
      MeasuredInverseDynamicJointMoments: is_enabled=true max_allowable_error=2.5
      ExtrapolatedMuscleActivations: is_enabled=true max_allowable_error=0.3
      ResidualMuscleActivations: is_enabled=true max_allowable_error=0.3
